# y'' - 3y' + y/x = 1 | y(0.4) = 2 | y(0.7) + 2y(0.7) = 0.7
# ______________________________________________________________________________
A1 := [1, 0, 0, 0; 0.115, -0.198, 0.085, 0; 0, 0.138, -0.238, 0.102; 0, 0, -2, 2.1]
p(x) := -3
q(x) := 1/x
f(x) := 1
a := 0.4
b := 0.7
n := 3
B1 := [2; 0.001; 0.0012; 0.07]
α[1] := 1
α[2] := 0
A := 2
h := (b - a)/n
h = 0.1
β[1] := 1
β[2] := 2
B := 0.7
# _____________________________________________________________________________
i := 0 .. n
x[i] := a + h*i
y := x
S := lsolve(A1, B1) = [2; 2.00766; 1.98256; 1.92149]
D(y, x) :=
    D[0] ← α[1]*y[0] + α[2]*(y[1] - y[0])/h - A
    for k ∈ 1 .. n - 1
        D[k] ← (y[k + 1] - 2*y[k] + y[k - 1])/h^2 + p(x[k])*(y[k + 1] - y[k - 1])/(2*h) + q(x[k])*y[k] - f(x[k])
    D[n] ← β[1]*y[n] + β[2]*(y[n] - y[n - 1])/h - B
    D
Given
D(y, x) == 0
y := Find(y)
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x = [0.4; 0.5; 0.6; 0.7]
y = [2; 2.00766; 1.98256; 1.92149]
